# Fibre Unidirectionnel
# Régidité | Résistance
E_11 := 135 GPa
X_t := 2410 MPa
E_22 := 10 GPa
X_c := □  # error: Cet emplacement réservé est vide.
E_33 := E_22 = 10 GPa
Y_t := 10 MPa
Y_c := □  # error: Cet emplacement réservé est vide.
G_12 := 5.2 GPa
S_12 := 152 MPa
G_13 := G_12 = 5.2 GPa
S_13 := S_12
G_23 := □  # error: Cet emplacement réservé est vide.
ν_12 := 0.29
ν_13 := ν_12 = 0.29
ν_23 := □  # error: Cet emplacement réservé est vide.
